X[1] := 19.85
X[5] := 20.13
X[2] := 19.92
X[6] := 20.20
X[3] := 19.99
X[7] := 20.27
X[4] := 20.06
X[8] := 20.34
X[9] := 20.41
n := 250
n_s[1] := 5
n_s[5] := 79
n_s[2] := 6
n_s[6] := 41
n_s[3] := 71
n_s[7] := 10
n_s[4] := 33
n_s[8] := 5
P[1] := n_s[1]/n = 0.02
P[5] := n_s[5]/n = 0.316
P[2] := n_s[2]/n = 0.024
P[6] := n_s[6]/n = 0.164
P[3] := n_s[3]/n = 0.284
P[7] := n_s[7]/n = 0.04
P[4] := n_s[4]/n = 0.132
P[8] := n_s[8]/n = 0.02
sum(P[i], i = 1 .. 8) = 1
aver_x[1] := (X[1] + X[2])/2 = 19.885
aver_x[5] := (X[5] + X[6])/2 = 20.165
aver_x[2] := (X[2] + X[3])/2 = 19.955
aver_x[6] := (X[6] + X[7])/2 = 20.235
aver_x[3] := (X[3] + X[4])/2 = 20.025
aver_x[7] := (X[7] + X[8])/2 = 20.305
aver_x[4] := (X[4] + X[5])/2 = 20.095
aver_x[8] := (X[8] + X[9])/2 = 20.375
m_x_summ := sum(P[i]*aver_x[i], i = 1 .. 8) = 20.1266
m_x[1] := P[1]*aver_x[1] = 0.3977
m_x[5] := P[5]*aver_x[5] = 6.37214
m_x[2] := P[2]*aver_x[2] = 0.47892
m_x[6] := P[6]*aver_x[6] = 3.31854
m_x[3] := P[3]*aver_x[3] = 5.6871
m_x[7] := P[7]*aver_x[7] = 0.8122
m_x[4] := P[4]*aver_x[4] = 2.65254
m_x[8] := P[8]*aver_x[8] = 0.4075
m_x_s := sum(m_x[i], i = 1 .. 8) = 20.1266
S_x_square := sum(n_s[i]*(aver_x[i] - m_x_summ)^2/(n - 1), i = 1 .. 8) = 0.00987722
S_square(i) := n_s[i]*(aver_x[i] - m_x_summ)^2/(n - 1)
S_square(1) = 0.00117249
S_square(5) = 0.000466858
S_square(2) = 0.000709886
S_square(6) = 0.0019334
S_square(3) = 0.0029457
S_square(7) = 0.0012776
S_square(4) = 0.000132675
S_square(8) = 0.00123861
S_x := sum(S_square(i), i = 1 .. 8) = 0.00987722
σ_x := sqrt(S_x_square) = 0.0993842
# При подстановки формулы Лапласа:
Φ(z) := 1*integral(e^(-t^2/2), t = 0 .. z)/sqrt(2*π)
nP(i) := Φ((X[i + 1] - m_x_summ)/σ_x) - Φ((X[i] - m_x_summ)/σ_x)
nP(1) = 0.0161109
nP(5) = 0.256302
nP(2) = 0.0657871
nP(6) = 0.15563
nP(3) = 0.166674
nP(7) = 0.0586793
nP(4) = 0.262225
nP(8) = 0.0137258
summa_nP := sum(nP(i), i = 1 .. 8) = 0.995134
# Рассчет отдельных значений параметров:
Z_i_plus_1(p) := (X[p + 1] - m_x_summ)/σ_x
Z_i(p) := (X[p] - m_x_summ)/σ_x
Z_i_plus_1(1) = -2.0792
Φ(Z_i_plus_1(1)) = -0.481201
Z_i(1) = -2.78354
Φ(Z_i(1)) = -0.497312
Z_i_plus_1(2) = -1.37487
Φ(Z_i_plus_1(2)) = -0.415414
Z_i(2) = -2.0792
Φ(Z_i(2)) = -0.481201
Z_i_plus_1(3) = -0.670529
Φ(Z_i_plus_1(3)) = -0.24874
Z_i(3) = -1.37487
Φ(Z_i(3)) = -0.415414
Z_i_plus_1(4) = 0.0338082
Φ(Z_i_plus_1(4)) = 0.0134849
Z_i(4) = -0.670529
Φ(Z_i(4)) = -0.24874
Z_i_plus_1(5) = 0.738145
Φ(Z_i_plus_1(5)) = 0.269787
Z_i(5) = 0.0338082
Φ(Z_i(5)) = 0.0134849
Z_i_plus_1(6) = 1.44248
Φ(Z_i_plus_1(6)) = 0.425417
Z_i(6) = 0.738145
Φ(Z_i(6)) = 0.269787
Z_i_plus_1(7) = 2.14682
Φ(Z_i_plus_1(7)) = 0.484096
Z_i(7) = 1.44248
Φ(Z_i(7)) = 0.425417
Z_i_plus_1(8) = 2.85116
Φ(Z_i_plus_1(8)) = 0.497822
Z_i(8) = 2.14682
Φ(Z_i(8)) = 0.484096
# ДЛЯ СВЕРКИ С ТАБЛИЦЕЙ | ДЛЯ СВЕРКИ С ТАБЛИЦЕЙ
χ_square := n*sum((P[i] - nP(i))^2/nP(i), i = 1 .. 8) = 49.4778
N[1] := (P[1] - nP(1))^2/nP(1) = 0.000938832
N[5] := (P[5] - nP(5))^2/nP(5) = 0.0139049
N[2] := (P[2] - nP(2))^2/nP(2) = 0.0265426
N[6] := (P[6] - nP(6))^2/nP(6) = 0.00045016
N[3] := (P[3] - nP(3))^2/nP(3) = 0.082589
N[7] := (P[7] - nP(7))^2/nP(7) = 0.00594616
N[4] := (P[4] - nP(4))^2/nP(4) = 0.0646715
N[8] := (P[8] - nP(8))^2/nP(8) = 0.00286802
Summa_N := sum(N[i], i = 1 .. 8) = 0.197911
n*Summa_N = 49.4778
# Соответственно:
m := 5
k := 3.32*log(n, 10) + 1 = 8.96116
α := 0.02
χ := 13.388
